# Diseño de fundaciones
# MURO: F34Y
σ_suelo := 8 kgf/cm^2
# 1. Dimensiones elementos
# Propiedades y esfuerzos de muro: | Dimensiones zapata:
L_muro := 0.83 m
L_zap := 55 cm + L_muro + 55 cm = 1.93 m
e_muro := 30 cm
B_zap := 150 cm
γ_H := 2.5 tonnef/m^3
H_zap := 140 cm
N_zap := γ_H*B_zap*L_zap*H_zap = 10.1325 tonnef
# 2. Esfuerzos de ETABS
N_PP := -43.05 tonnef
M_PP := -35.52 tonnef*m
N_SC := -14.3527 tonnef
M_SC := 2.9775 tonnef*m
N_SX := 82.848 tonnef
M_SX := 15.8042 tonnef*m
N_SY := 22.1321 tonnef
M_SY := 14.3156 tonnef*m
# 3. Combinaciones
# 3.1. Combinaciones estáticas
# Combinación 1 (PP)
N_est1 := N_zap + |N_PP| = 53.1825 tonnef
M_est1 := M_PP = -35.52 tonnef*m
l := L_zap/6 = 0.321667 m
e := |M_est1/N_est1| = 0.667889 m
L' := 3*(L_zap/2 - e) = 0.891333 m
σ_est1 :=
    if e < l
        max(N_est1/(B_zap*L_zap) + 6*M_est1/(B_zap*L_zap^2), N_est1/(B_zap*L_zap) - 6*M_est1/(B_zap*L_zap^2))
    else if e == l
        2*N_est1/(B_zap*L_zap)
    else
        2*N_est1/(B_zap*L')
    = 7.9555 kgf/cm^2
# Combinación 2 (PP+SC)
N_est1 := N_zap + |N_PP| + |N_SC| = 67.5352 tonnef
M_est1 := M_PP + M_SC = -32.5425 tonnef*m
l := L_zap/6 = 0.321667 m
e := |M_est1/N_est1| = 0.48186 m
L' := 3*(L_zap/2 - e) = 1.44942 m
σ_est2 :=
    if e < l
        max(N_est1/(B_zap*L_zap) + 6*M_est1/(B_zap*L_zap^2), N_est1/(B_zap*L_zap) - 6*M_est1/(B_zap*L_zap^2))
    else if e == l
        2*N_est1/(B_zap*L_zap)
    else
        2*N_est1/(B_zap*L')
    = 6.21262 kgf/cm^2
σ_est := max(σ_est1, σ_est2) = 7.9555 kgf/cm^2
# 3.2. Combinaciones sísmicas
# Combinación 3,1 (PP+SX)
N_sis1 := N_zap + |N_PP| + N_SX = 136.03 tonnef
M_sis1 := M_PP + M_SX = -19.7158 tonnef*m
l := L_zap/6 = 0.321667 m
e := |M_sis1/N_sis1| = 0.144937 m
L' := 3*(L_zap/2 - e) = 2.46019 m
σ_sis31 :=
    if e < l
        max(N_sis1/(B_zap*L_zap) + 6*M_sis1/(B_zap*L_zap^2), N_sis1/(B_zap*L_zap) - 6*M_sis1/(B_zap*L_zap^2))
    else if e == l
        2*N_sis1/(B_zap*L_zap)
    else
        2*N_sis1/(B_zap*L')
    = 6.816 kgf/cm^2
# Combinación 3,2 (PP-SX)
N_sis1 := N_zap + |N_PP| - N_SX = -29.6655 tonnef
M_sis1 := M_PP - M_SX = -51.3242 tonnef*m
l := L_zap/6 = 0.321667 m
e := |M_sis1/N_sis1| = 1.7301 m
L' := 3*(L_zap/2 - e) = -2.29529 m
σ_sis32 :=
    if e < l
        max(N_sis1/(B_zap*L_zap) + 6*M_sis1/(B_zap*L_zap^2), N_sis1/(B_zap*L_zap) - 6*M_sis1/(B_zap*L_zap^2))
    else if e == l
        2*N_sis1/(B_zap*L_zap)
    else
        2*N_sis1/(B_zap*L')
    = 1.72327 kgf/cm^2
# Combinación 4,1 (PP+0.75(SC+S))
N_sis1 := N_zap + |N_PP| + 0.75*|N_SC| + 0.75*N_SX = 126.083 tonnef
M_sis1 := M_PP + 0.75*M_SC + 0.75*M_SX = -21.4337 tonnef*m
l := L_zap/6 = 0.321667 m
e := |M_sis1/N_sis1| = 0.169997 m
L' := 3*(L_zap/2 - e) = 2.38501 m
σ_sis41 :=
    if e < l
        max(N_sis1/(B_zap*L_zap) + 6*M_sis1/(B_zap*L_zap^2), N_sis1/(B_zap*L_zap) - 6*M_sis1/(B_zap*L_zap^2))
    else if e == l
        2*N_sis1/(B_zap*L_zap)
    else
        2*N_sis1/(B_zap*L')
    = 6.65687 kgf/cm^2
# Combinación 4,2 (PP+0.75(SC-S))
N_sis1 := N_zap + |N_PP| + 0.75*|N_SC| - 0.75*N_SX = 1.81103 tonnef
M_sis1 := M_PP + 0.75*M_SC - 0.75*M_SX = -45.14 tonnef*m
l := L_zap/6 = 0.321667 m
e := |M_sis1/N_sis1| = 24.9251 m
L' := 3*(L_zap/2 - e) = -71.8804 m
σ_sis42 :=
    if e < l
        max(N_sis1/(B_zap*L_zap) + 6*M_sis1/(B_zap*L_zap^2), N_sis1/(B_zap*L_zap) - 6*M_sis1/(B_zap*L_zap^2))
    else if e == l
        2*N_sis1/(B_zap*L_zap)
    else
        2*N_sis1/(B_zap*L')
    = -0.00335933 kgf/cm^2
# Combinación 5,1 (0.6PP+SX)
N_sis1 := 0.6*N_zap + 0.6*|N_PP| + N_SX = 114.757 tonnef
M_sis1 := 0.6*M_PP + M_SX = -5.5078 tonnef*m
l := L_zap/6 = 0.321667 m
e := |M_sis1/N_sis1| = 0.0479951 m
L' := 3*(L_zap/2 - e) = 2.75101 m
σ_sis51 :=
    if e < l
        max(N_sis1/(B_zap*L_zap) + 6*M_sis1/(B_zap*L_zap^2), N_sis1/(B_zap*L_zap) - 6*M_sis1/(B_zap*L_zap^2))
    else if e == l
        2*N_sis1/(B_zap*L_zap)
    else
        2*N_sis1/(B_zap*L')
    = 4.55545 kgf/cm^2
# Combinación 5,2 (0.6PP-SX)
N_sis1 := 0.6*N_zap + 0.6*|N_PP| - N_SX = -50.9385 tonnef
M_sis1 := 0.6*M_PP - M_SX = -37.1162 tonnef*m
l := L_zap/6 = 0.321667 m
e := |M_sis1/N_sis1| = 0.728647 m
L' := 3*(L_zap/2 - e) = 0.709058 m
σ_sis52 :=
    if e < l
        max(N_sis1/(B_zap*L_zap) + 6*M_sis1/(B_zap*L_zap^2), N_sis1/(B_zap*L_zap) - 6*M_sis1/(B_zap*L_zap^2))
    else if e == l
        2*N_sis1/(B_zap*L_zap)
    else
        2*N_sis1/(B_zap*L')
    = -9.57862 kgf/cm^2
σ_sis := max(σ_sis31, σ_sis32, σ_sis41, σ_sis42, σ_sis51, σ_sis52) = 6.816 kgf/cm^2
# 4. Chequeo parrilla
# Momento lado corto | Momento Lado Largo
M1 := σ_sis*(B_zap/2)^2*1 m/2 = 19.17 tonnef*m
M2 := σ_sis*((L_zap - L_muro)/2)^2*1 m/2 = 10.3092 tonnef*m
# Propiedad de la Sección de Zapata | Propiedad de la Sección de Zapata
W := 1/6*1 m*H_zap^2 = 0.326667 m^3
W := 1/6*1 m*H_zap^2 = 0.326667 m^3
M1/W = 5.86837 kgf/cm^2
M2/W = 3.15588 kgf/cm^2
if M1/W < 7 kgf/cm^2
    "No necesita parrilla"
else
    "Necesita Parrilla"
= "No necesita parrilla"
if M2/W < 7 kgf/cm^2
    "No necesita parrilla"
else
    "Necesita Parrilla"
= "No necesita parrilla"
